<?xml version="1.0" ?>
<Node name="root" dt="0.5" showBoundingTree="0" gravity="0 0 0">
 <RequiredPlugin name="SofaAdvancedFEM plugin" pluginName="SofaAdvancedFEM" />
		<GenerateGrid template="Vec3d" name="Slab" width="0.2" height="0.2" length="0.2" resHeight="5" resWidth="5" resLength="5" />
        <TetrahedronSetTopologyContainer name="Container1" tetrahedra="@[-1].tetrahedra" position="@[-1].output_position" createTriangleArray="1"/>
        <TetrahedronSetGeometryAlgorithms  drawEdges="1"/>
		<CGLinearSolver iterations="5000" name="linear solver" tolerance="1.0e-17" threshold="1.0e-17" />
		<StaticSolver name="default12" applyIncrementFactor="true" />
        <MechanicalObject name="dofs" rest_position="@[-5].output_position"/>
		<!-- <MeshMatrixMass name="mass" lumping="1" printMass="0" massDensity="1" />	 -->
		<BoxROI box="-0.01 -0.01 -0.01 0.01 0.01 0.01" drawBoxes="1" name="fixedPoint"  />
		<FixedConstraint indices="@fixedPoint.indices" />
		<FixedPlaneConstraint direction="0 0 1" dmin="-0.01" dmax="0.01"  />
		<BoxROI box="-0.9 -0.9 0.99 0.9 0.9 1.01" trianglesInROI="1" drawBoxes="1" name="pressurePlane"  />
		<ProjectToLineConstraint direction="1 0 0" origin="0 0 0" indices="1 2 3 4"  />
	<!-- 	<ProjectToLineConstraint direction="0 1 0" origin="0 0 0" indices="5 10 15 20"  /> -->
		<!-- <ProjectToLineConstraint direction="0 0 1" origin="0 0 0" indices="125"  /> -->
	<!-- 	<TrianglePressureForceField  onRestPosition="0" showForces="1"  triangleList="@pressurePlane.triangleIndices" pressure="0.0 0 -0.1804511277" /> -->
		<TrianglePressureForceField  name="TPF1" showForces="1"  normal="0 0 1" dmin="0.99" dmax="1.01" useConstantForce="0" cauchyStress="[0 0 0.1244961005 0 0 0 0.1244961005 0 0]" />
		<TrianglePressureForceField  name="TPF2" showForces="1"  normal="0 0 1" dmin="-0.01" dmax="0.01" useConstantForce="0" cauchyStress="[0 0 0.1244961005 0 0 0 0.1244961005 0 0]" />
		<TrianglePressureForceField  name="TPF3" showForces="1"  normal="1 0 0" dmin="-0.01" dmax="0.01" useConstantForce="0" cauchyStress="[0 0 0.1244961005 0 0 0 0.1244961005 0 0]" />
		<TrianglePressureForceField  name="TPF4" showForces="1"  normal="1 0 0" dmin="0.99" dmax="1.01" useConstantForce="0" cauchyStress="[0 0 0.1244961005 0 0 0 0.1244961005 0 0]" />
<!--  <SurfacePressureForceField  useTangentStiffness="false"   triangleIndices="@pressurePlane.triangleIndices"  pressure="0.3883416901" /> -->

	   <!--  <TetrahedralStVenantKirchhoffForceField poissonRatio="0.1" compressible="true" youngModulus="1"  />   -->
	<!-- 	<MRForceField ParameterSet="" /> -->
	   <StandardTetrahedralFEMForceField materialName="NeoHookean" ParameterSet="0.3448275862 3.333333334"/>
		<!-- <Monitor indices="52" showPositions="1" ExportPositions="1"/> -->
</Node>
