<?xml version="1.0" ?>
<Node name="root" dt="2" showBoundingTree="0" gravity="0 0 0">
    <RequiredPlugin name="SofaAdvancedFEM plugin" pluginName="SofaAdvancedFEM" />
    <VisualStyle displayFlags="showBehaviorModels showForceFields  showVisual" />
    <CollisionPipeline verbose="0" name="CollisionPipeline" />
    <BruteForceDetection name="N2" />
    <CollisionResponse response="default" name="collision response" />
    <Node name="MeshTopology">
		<GenerateGrid template="Vec3d" name="Grid" />
		<BoxROI  template="Vec3d" position="@Grid.output_position" box="0.9 0.9 0.9 2.1 2.1 2.1" computeOutside="1" name="boxRandom" />
		<TransformPosition name="RandomizedCentralPosition" input_position="@Grid.output_position" method="random" fixedIndices="@boxRandom.indicesOutside" maxRandomDisplacement="0.3" />
        <HexahedronSetTopologyContainer name="Container1" position="@RandomizedCentralPosition.output_position" hexahedra="@Grid.hexahedra" createQuadArray="1"  />
        <HexahedronSetGeometryAlgorithms name="GeomAlgo" drawQuads="1"/>
        <MechanicalObject name="dofs" />
		<CGLinearSolver iterations="500" name="linear solver" tolerance="1.0e-9" threshold="1.0e-9" />
		<StaticSolver  />
	<!-- 	<EulerImplicitSolver threshold="1e-9" tolerance="1e-9"/> -->
		<MeshMatrixMass template="Vec3d" name="mass" lumping="1" printMass="0" massDensity="1"  integrationMethod="analytical" numericalIntegrationMethod="0" integrationOrder="6"/>
		<FastHexahedralCorotationalForceField poissonRatio="0.25" youngModulus="1"  integrationMethod="numerical" numericalIntegrationMethod="0" integrationOrder="2" method="linear" />
	<!-- 	<HexahedralFEMForceField poissonRatio="0.25" youngModulus="1"  integrationMethod="numerical" numericalIntegrationMethod="0" integrationOrder="2" method="large" />  -->
        <SphereModel radius="0.05" />
		<BoxROI box="-0.1 2.9 -0.1 3.1 3.2 3.5" drawBoxes="0" name="pressurePlane"  />
		<QuadPressureForceField quadList="@pressurePlane.quadIndices" showForces="1" pressure="0 0.4 0"  name="pressurePlane"  />
		<BoxROI box="-0.1 -0.1 -0.1 3.1 0.2 3.5" drawBoxes="0" name="fixedPlane"  />
		 <FixedPlaneConstraint direction="0 1 0" dmin="-0.1" dmax="0.1" />
        <FixedConstraint indices="0" />
		<Monitor indices="63" showPositions="1" showTrajectories="1" ExportPositions="1"/>
<!-- 		<ClipPlane normal="0 0 1"  position="0 0 2.2"/> -->
		<!-- 	expected displacement of node 63 is 3.3 1.8 amd 3.3 -->
    </Node>
</Node>
