<Node name="Root" gravity="0 0 0" dt="0.05" displayFlags="showVisualModels hideBehaviorModels hideCollisionModels hideBoundingCollisionModels hideMappings hideMechanicalMappings hideForceFields hideInteractionForceFields">
	<RequiredPlugin name="SofaHighOrderTopology plugin" pluginName="SofaHighOrderTopology" />
    <RequiredPlugin name="SofaHighOrderFEM plugin" pluginName="SofaHighOrderFEM" />
	<Object type="LightManager" shadows="0" ambient="1 1 1 1"/>
	<Node name="MecaQuadNode" gravity="0 0 0">
        <MeshVTKLoader name="VtkLoader" filename="mesh/rectangle.vtk" />
		<HighOrderTriangleSetTopologyContainer name="ContainerBezier"  position="@VtkLoader.position" triangles="@VtkLoader.triangles" inputHighOrderEdges="@VtkLoader.edges" inputHighOrderEdgePositions="@VtkLoader.highOrderEdgePositions"  degree="2" />
		<MechanicalObject showObject="0" name="BezierMeca" template="Vec2d" />
		<BezierTriangleSetGeometryAlgorithms name="GeomAlgo" template="Vec2d" drawControlPoints="true"  drawEdges="true" drawColorEdges="1 0 0"/>
		<StaticSolver  applyIncrementFactor="1"/>
		<CGLinearSolver iterations="500" name="linear solver" tolerance="1.0e-9" threshold="1.0e-9" />

		<HighOrderTriangularCorotationalFEMForceField name="Elasticity" template="Vec2d" printLog="0" poissonRatio="0.45" youngModulus="4"  integrationMethod="standard" numericalIntegrationMethod="3" integrationOrder="4" method="linear"  />
		<BoxROI name="ROIZL" template="Vec3d" box="-0.01 -0.01 -0.01 2 0.01 0.01" drawBoxes="true" />
		<FixedConstraint indices="@ROIZL.indices" />
	</Node> <!-- meca -->
</Node> <!-- root -->
