<?xml version="1.0" ?>


<Node name="root" dt="0.001" showBoundingTree="0" gravity="10000 0 0">
	<RequiredPlugin name="SofaHighOrderFEM plugin" pluginName="SofaHighOrderFEM" />
	<RequiredPlugin name="SofaHighOrderTopology plugin" pluginName="SofaHighOrderTopology" />
	<VisualStyle displayFlags="showVisual" />

	<Node name="TetrahedralCylinder" >
		<GenerateBezierCylinder template="Vec3d" name="Cylinder1" radius="0.2" height="1.0" resHeight="2" resCircumferential="3" resRadial="1" BezierTetrahedronDegree="3" />
		<HighOrderTetrahedronSetTopologyContainer name="Container1"  degree="@Cylinder1.BezierTetrahedronDegree" isRational="@Cylinder1.isBezierTetrahedronRational"   weights="@Cylinder1.BezierTetrahedronWeights" tetrahedra="@Cylinder1.tetrahedra" position="@Cylinder1.output_TetrahedraPosition"/>
		<BezierTetrahedronSetGeometryAlgorithms  drawControlPointsEdges="0" drawControlPoints="0" drawSmoothEdges="0"/>
		<MechanicalObject name="dofs1" rest_position="@Cylinder1.output_TetrahedraPosition"/>

		<Node name="BezierTriangleTopology" >
			<TriangleSetTopologyModifier />
			<HighOrderTriangleSetTopologyContainer name="ContainerTriangleBezier1"/>
			<HighOrderTetra2HighOrderTriangleTopologicalMapping input="@../Container1" output="@ContainerTriangleBezier1"  />
			<BezierTriangleSetGeometryAlgorithms name="GeomAlgo1" drawControlPointsEdges="true" drawControlPoints="true" />

			<Node name="TriangleTopology">
				<TriangleSetTopologyContainer name="triangulation1" />
				<TriangleSetGeometryAlgorithms  />
				<HighOrder2MeshTopologicalMapping tesselatedTriangleDegree="5" input="@../ContainerTriangleBezier1" output="@triangulation1"/>
				<MechanicalObject name="triangleDofs1" />
				<Bezier2MeshMechanicalMapping input="@../../dofs1" mapForces="0" output="@triangleDofs1"/>

				<Node name="VisualNode">
					<OglModel name="VisualModel1" />
					<IdentityMapping input="@.." output="@VisualModel1" />
				</Node>

			</Node>

		</Node>
	</Node>

	<Node name="TriangularCylinder" >
		<GenerateBezierCylinder template="Vec3d" name="Cylinder2" radius="0.2" height="1.0" resHeight="2" origin="3 0 0" resCircumferential="4" resRadial="1" BezierTriangleDegree="3" />
		<HighOrderTriangleSetTopologyContainer name="Container2"  degree="@Cylinder2.BezierTriangleDegree" isRational="@Cylinder2.isBezierTriangleRational"   weights="@Cylinder2.BezierTriangleWeights" triangles="@Cylinder2.triangles" position="@Cylinder2.output_TrianglesPosition"/>
		<BezierTriangleSetGeometryAlgorithms  drawControlPointsEdges="true" drawControlPoints="true" drawSmoothEdges="true"/>
		<MechanicalObject name="dofs2" rest_position="@Cylinder2.output_TrianglesPosition"/>

		<Node name="TriangleTopology2">
			<TriangleSetTopologyContainer name="triangulation2" />
			<TriangleSetGeometryAlgorithms  />
			<HighOrder2MeshTopologicalMapping tesselatedTriangleDegree="5" input="@../Container2" output="@triangulation2"/>
			<MechanicalObject name="triangleDofs2" />
			<Bezier2MeshMechanicalMapping input="@../dofs2" mapForces="0" output="@triangleDofs2"/>

			<Node name="VisualNode">
				<OglModel name="VisualModel2" />
				<IdentityMapping input="@.." output="@VisualModel2" />
			</Node>

		</Node>

	</Node>
</Node>
