<Node name="Root" gravity="0 0 0" dt="0.05" displayFlags="showVisualModels hideBehaviorModels hideCollisionModels hideBoundingCollisionModels hideMappings hideMechanicalMappings hideForceFields hideInteractionForceFields">
	<RequiredPlugin name="SofaHighOrderTopology plugin" pluginName="SofaHighOrderTopology" />
    <RequiredPlugin name="SofaHighOrderFEM plugin" pluginName="SofaHighOrderFEM" />

	<Node name="MecaNode" gravity="0 0 0">
        <MeshHOMFLoader name="HOMFLoader" filename="mesh/gridTrianglesDeg4.hom" />
		<HighOrderTriangleSetTopologyContainer name="ContainerBezier"  position="@HOMFLoader.position" triangles="@HOMFLoader.triangles" inputHighOrderEdges="@HOMFLoader.edges" inputHighOrderEdgePositions="@HOMFLoader.highOrderEdgePositions"  inputHighOrderTrianglePositions="@HOMFLoader.highOrderTrianglePositions"  degree="@HOMFLoader.degree" />
		<MechanicalObject showObject="0" name="BezierMeca" template="Vec2d" />
		<BezierTriangleSetGeometryAlgorithms name="GeomAlgo" template="Vec2d" drawControlPoints="true"  drawEdges="true" drawColorEdges="1 0 0"/>
	</Node> <!-- meca -->
</Node> <!-- root -->
