<Node name="Root" gravity="0 0 0" dt="0.05" displayFlags="showVisualModels hideBehaviorModels hideCollisionModels hideBoundingCollisionModels hideMappings hideMechanicalMappings hideForceFields hideInteractionForceFields">
	<RequiredPlugin name="SofaHighOrderTopology plugin" pluginName="SofaHighOrderTopology" />
    <RequiredPlugin name="SofaHighOrderFEM plugin" pluginName="SofaHighOrderFEM" />

	<Node name="MecaQuadNode" gravity="0 0 0">
        <MeshVTKLoader name="VtkLoader" filename="mesh/rectangle.vtk" />
		<HighOrderTriangleSetTopologyContainer name="ContainerBezier"  position="@VtkLoader.position" triangles="@VtkLoader.triangles" inputHighOrderEdges="@VtkLoader.edges" inputHighOrderEdgePositions="@VtkLoader.highOrderEdgePositions"  degree="2" />
		<MechanicalObject showObject="0" name="BezierMeca" template="Vec2d" />
		<BezierTriangleSetGeometryAlgorithms name="GeomAlgo" template="Vec2d" drawControlPoints="true"  drawEdges="true" drawColorEdges="1 0 0"/>
	</Node> <!-- meca -->
</Node> <!-- root -->
