<?xml version="1.0" ?>
<Node name="root" dt="0.2" showBoundingTree="0" gravity="0 0 0">
    <RequiredPlugin name="SofaHighOrderTopology plugin" pluginName="SofaHighOrderTopology" />
    <RequiredPlugin name="SofaHighOrderFEM plugin" pluginName="SofaHighOrderFEM" />
    <VisualStyle displayFlags="showBehaviorModels showForceFields showCollisionModels showVisual" />
    <CollisionPipeline verbose="0" name="CollisionPipeline" />
    <BruteForceDetection name="N2" />
    <CollisionResponse response="default" name="collision response" />
    <Node name="MeshTopology">
<!-- 	   <GenerateCylinder template="Vec3d" name="Cylinder" radius="0.2" height="1.0" resHeight="3" resCircumferential="5" resRadial="2" BezierTetrahedronDegree="2" /> -->
   <GenerateCylinder template="Vec3d" name="Cylinder" radius="0.2" height="1.0" resHeight="6" resCircumferential="8" resRadial="3"  />
        <TetrahedronSetTopologyContainer name="Container1" tetrahedra="@Cylinder.tetrahedra" position="@Cylinder.output_TetrahedraPosition" />

		<TetrahedronSetGeometryAlgorithms name="GeomAlgo" drawEdges="0" />
        <MechanicalObject name="dofs" />

		<Node name="HighOrder">
			<CGLinearSolver iterations="500" name="linear solver" tolerance="1.0e-9" threshold="1.0e-9" />
			<StaticSolver  applyIncrementFactor="1"/>
        	<HighOrderTetrahedronSetTopologyContainer name="ContainerBezier" />

			<Mesh2HighOrderTopologicalMapping name="topoMapping" input="@../Container1" output="@ContainerBezier" bezierTetrahedronDegree="2" />
			<MechanicalObject showObject="0" showObjectScale="1" />
			<BezierTetrahedronSetGeometryAlgorithms name="GeomAlgo" drawControlPoints="true"  drawEdges="true" drawColorEdges="1 0 0"/>
			<BoxROI name="ROIZL" box="-1 -1 -0.001 1 1 0.001" drawBoxes="false" />
			<FixedConstraint indices="@ROIZL.indices" />
			<Sphere radius="0.04" />
			<HighOrderMeshMatrixMass name="mass" massDensity="1" integrationMethod="exact" forceAffineAssemblyForAffineElements="0" numericalIntegrationMethod="3" integrationOrder="4" printLog="1"  />
			<HighOrderTetrahedralCorotationalFEMForceField name="Elasticity" printLog="0" forceAffineAssemblyForAffineElements="0" poissonRatio="0.45" youngModulus="4"  integrationMethod="standard" numericalIntegrationMethod="3" integrationOrder="4" method="qr"  />
			</Node>
    </Node>
</Node>
