<?xml version="1.0" ?>
<Node name="root" dt="0.2" showBoundingTree="0" gravity="0 0 0">
    <RequiredPlugin name="SofaHighOrderTopology plugin" pluginName="SofaHighOrderTopology" />
    <RequiredPlugin name="SofaHighOrderFEM plugin" pluginName="SofaHighOrderFEM" />
    <VisualStyle displayFlags="showBehaviorModels showForceFields showCollisionModels showVisual" />
    <CollisionPipeline verbose="0" name="CollisionPipeline" />
    <BruteForceDetection name="N2" />
    <CollisionResponse response="default" name="collision response" />
    <Node name="MeshTopology">
        <TriangleSetTopologyContainer name="Container1" triangles="0 1 2" position="0 0 0 1 0 0 0 1 0"/>
        <TriangleSetGeometryAlgorithms name="GeomAlgo" template="Vec2d" drawEdges="1" />
        <MechanicalObject name="dofs" template="Vec2d"/>
		<Node name="HighOrder">

        	<HighOrderTriangleSetTopologyContainer name="ContainerBezier" />

			<Mesh2HighOrderTopologicalMapping name="topoMapping" input="@../Container1" output="@ContainerBezier" bezierTriangleDegree="12" />
			<MechanicalObject showObject="0" showObjectScale="1" template="Vec2d" />
			<BezierTriangleSetGeometryAlgorithms name="GeomAlgo" template="Vec2d" drawControlPoints="true"  drawEdges="true" drawColorEdges="1 0 0"/>
			<HighOrderMeshMatrixMass name="Mass"  template="Vec2d" lumping="0" massDensity="1" integrationMethod="analytical" forceAffineAssemblyForAffineElements="0" numericalIntegrationMethod="Triangle Gauss" integrationOrder="8" printLog="1" />
			<HighOrderTriangularCorotationalFEMForceField name="Elasticity"  template="Vec2d" printLog="0" poissonRatio="0.45" forceAffineAssemblyForAffineElements="0" youngModulus="4"  integrationMethod="analytical" numericalIntegrationMethod="Triangle Conical Rules" integrationOrder="22" method="linear"  />

			</Node>
    </Node>
</Node>
