<Node name="Root" gravity="0 0 0" dt="0.05" displayFlags="showVisualModels hideBehaviorModels hideCollisionModels hideBoundingCollisionModels hideMappings hideMechanicalMappings hideForceFields hideInteractionForceFields">
	<RequiredPlugin name="SofaHighOrderTopology plugin" pluginName="SofaHighOrderTopology" />
    <RequiredPlugin name="SofaHighOrderFEM plugin" pluginName="SofaHighOrderFEM" />
	<RequiredPlugin pluginName="Electrophysiology"/>
	<Object type="LightManager" shadows="0" ambient="1 1 1 1"/>
	<Node name="MecaQuadNode" gravity="0 0 0">
		<GenerateGrid template="Vec2d" name="grid" resolution="1 1 0" min="0 0 0" max="2 2 0"  tags="meca"/>
		<TriangleSetTopologyContainer name="triangleContainer"  position="@grid.output_position" triangles="@grid.triangles"/>
		<MechanicalObject template="Vec2d" name="mecaObj" tags="meca"/>
	    <TriangleSetGeometryAlgorithms template="Vec2d" drawEdges="1"  />
			<Node name="HighOrder">
				<CGLinearSolver iterations="500" name="linear solver" tolerance="1.0e-9" threshold="1.0e-9" />
				<StaticSolver  applyIncrementFactor="1"/>
				<TriangleSetTopologyModifier   />
				<HighOrderTriangleSetTopologyContainer name="ContainerBezier" />

				<Mesh2HighOrderTopologicalMapping name="topoMapping" input="@../triangleContainer" output="@ContainerBezier" bezierTriangleDegree="2" />
				<MechanicalObject showObject="0" name="BezierMeca" template="Vec2d" />
				<BezierTriangleSetGeometryAlgorithms name="GeomAlgo" template="Vec2d" drawControlPoints="true"  drawEdges="true" drawColorEdges="1 0 0"/>
				<HighOrderTriangularCorotationalFEMForceField name="Elasticity" template="Vec2d" forceAffineAssemblyForAffineElements="0" printLog="1" poissonRatio="0.45" youngModulus="4"  integrationMethod="standard" numericalIntegrationMethod="3" integrationOrder="4" method="linear"  />
				<BoxROI name="ROIZL" template="Vec3d" box="-0.01 -0.01 -0.01 2 0.01 0.01" drawBoxes="true" />
				<FixedConstraint indices="@ROIZL.indices" />
			</Node>
	</Node> <!-- meca -->
</Node> <!-- root -->
