<?xml version="1.0" ?>
<Node name="root" dt="0.005" showBoundingTree="0" gravity="0 -9 0">
    <RequiredPlugin name="SofaAdvancedFEM plugin" pluginName="SofaAdvancedFEM" />
	<VisualStyle displayFlags="showForceFields showBehaviorModels" />

	<CollisionPipeline verbose="0" />
	<BruteForceDetection name="N2" />
	<CollisionResponse response="default" />
	<MinProximityIntersection name="Proximity" alarmDistance="0.8" contactDistance="0.5" />
	<CollisionGroup />

	<Node name="Corrotational">
		<EulerImplicit name="cg_odesolver" printLog="false" />
		<CGLinearSolver iterations="25" name="linear solver" tolerance="1.0e-9" threshold="1.0e-9" />

		<RegularGridTopology name="hexaGrid" min="0 0 0" max="1 1 2.7" n="3 3 8" p0="0 0 0"/>

		<MechanicalObject name="mechObj"/>
		<UniformMass/>
		<TetrahedronFEMForceField name="FEM" youngModulus="10000" poissonRatio="0.45" method="large" />

		<BoxROI drawBoxes="0" box="0 0 0 1 1 0.05" name="box"/>
		<FixedConstraint indices="@box.indices"/>
	</Node>

	<Node name="ArrudaBoyce">
		<EulerImplicit name="cg_odesolver" printLog="false" />
		<CGLinearSolver iterations="25" name="linear solver" tolerance="1.0e-9" threshold="1.0e-9" />

		<RegularGrid name="hexaGrid" min="0 0 0" max="1 1 2.7" n="3 3 8" p0="2 0 0"/>

		<MechanicalObject name="mechObj"/>
		<UniformMass/>

		<Node name="tetras">
			<TetrahedronSetTopologyContainer name="Container"/>
			<TetrahedronSetTopologyModifier name="Modifier" />
			<TetrahedronSetTopologyAlgorithms template="Vec3d" name="TopoAlgo" />
			<TetrahedronSetGeometryAlgorithms template="Vec3d" name="GeomAlgo" />
			<Hexa2TetraTopologicalMapping name="default28" input="@../" output="@Container" printLog="0" />

			<TetrahedralTotalLagrangianForceField name="FEM" ParameterSet="3448.2759 31034.483"/>
		</Node>

		<BoxROI drawBoxes="1" box="2 0 0 3 1 0.05" name="box"/>
		<FixedConstraint indices="@box.indices"/>
	</Node>

	<Node name="StVenantKirchhoff">
		<EulerImplicit name="cg_odesolver" printLog="false" />
		<CGLinearSolver iterations="25" name="linear solver" tolerance="1.0e-9" threshold="1.0e-9" />

		<RegularGrid name="hexaGrid" min="0 0 0" max="1 1 2.7" n="3 3 8" p0="4 0 0"/>

		<MechanicalObject name="mechObj"/>
		<UniformMass/>

		<Node name="tetras">
			<TetrahedronSetTopologyContainer name="Container"/>
			<TetrahedronSetTopologyModifier name="Modifier" />
			<TetrahedronSetTopologyAlgorithms template="Vec3d" name="TopoAlgo" />
			<TetrahedronSetGeometryAlgorithms template="Vec3d" name="GeomAlgo" />
			<Hexa2TetraTopologicalMapping name="default28" input="@../" output="@Container" printLog="0" />

			<TetrahedralTotalLagrangianForceField name="FEM" ParameterSet="3448.2759 31034.483" materialName="StVenantKirchhoff"/>
		</Node>

		<BoxROI drawBoxes="1" box="4 0 0 5 1 0.05" name="box"/>
		<FixedConstraint indices="@box.indices"/>
	</Node>


	<Node name="NeoHookean">
		<EulerImplicit name="cg_odesolver" printLog="false" />
		<CGLinearSolver iterations="25" name="linear solver" tolerance="1.0e-9" threshold="1.0e-9" />

		<RegularGrid name="hexaGrid" min="0 0 0" max="1 1 2.7" n="3 3 8" p0="6 0 0"/>

		<MechanicalObject name="mechObj"/>
		<UniformMass/>

		<Node name="tetras">
			<TetrahedronSetTopologyContainer name="Container"/>
			<TetrahedronSetTopologyModifier name="Modifier" />
			<TetrahedronSetTopologyAlgorithms template="Vec3d" name="TopoAlgo" />
			<TetrahedronSetGeometryAlgorithms template="Vec3d" name="GeomAlgo" />
			<Hexa2TetraTopologicalMapping name="default28" input="@../" output="@Container" printLog="0" />

			<TetrahedralTotalLagrangianForceField name="FEM" ParameterSet="3448.2759 31034.483" materialName="NeoHookean"/>
		</Node>

		<BoxROI drawBoxes="1" box="6 0 0 7 1 0.05" name="box"/>
		<FixedConstraint indices="@box.indices"/>
	</Node>


	<Node name="MooneyRivlin">
		<EulerImplicit name="cg_odesolver" printLog="false" />
		<CGLinearSolver iterations="25" name="linear solver" tolerance="1.0e-9" threshold="1.0e-9" />

		<RegularGrid name="hexaGrid" min="0 0 0" max="1 1 2.7" n="3 3 8" p0="8 0 0"/>

		<MechanicalObject name="mechObj"/>
		<UniformMass/>

		<Node name="tetras">
			<TetrahedronSetTopologyContainer name="Container"/>
			<TetrahedronSetTopologyModifier name="Modifier" />
			<TetrahedronSetTopologyAlgorithms template="Vec3d" name="TopoAlgo" />
			<TetrahedronSetGeometryAlgorithms template="Vec3d" name="GeomAlgo" />
			<Hexa2TetraTopologicalMapping name="default28" input="@../" output="@Container" printLog="0" />

			<TetrahedralTotalLagrangianForceField name="FEM" ParameterSet="5000 7000 10" materialName="MooneyRivlin"/>
		</Node>

		<BoxROI drawBoxes="1" box="8 0 0 9 1 0.05" name="box"/>
		<FixedConstraint indices="@box.indices"/>
	</Node>
</Node>
